a := 4
f(x) := sin(x)^2/e^(sin(x)^2)
g(x) := f'(x)
F(x) := integral(f(y), y = 0 .. x)
b := 6
y(x) := a*x + b - f(x)
x := 1
r := root(y(x), x)
# [plot: f(i) vs i]
# [plot: g(i) vs i]
# [plot: F(i) vs i]
# [plot: y(i) vs i]
F(x, y) := 1/sin(x)^2 + 1/cos(y)^2
i := 1 .. 20
j := 1 .. 20
# [3D plot: M]
M[i, j] := F(i, j)
